M(α, β) := α/β
Г(x) := integral(e^(-t)*t^(x - 1), t = 0 .. ∞)
# [plot: M(a, 0.5) vs a]
M(α, 0.5)
f(t, α, β) := β^α/Г(α)*t^(α - 1)*e^(-β*t)
# [plot: f(t, 1, 0.5), f(t, 5, 1), f(t, 0.5, 1) vs t]
f(t, α, β)
α
t
a1(α, β) := integral(t*f(t, α, β), t = 0 .. ∞)
F(t, α, β) := integral(f(t, α, β), t = 0 .. t)
a2(α, β) := integral(t^2*f(t, α, β), t = 0 .. ∞)
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# [plot: F(t, 1, 0.5), F(t, 5, 1), F(t, 0.5, 1) vs t]
F(t, α, β)
a3(α, β) := integral(t^3*f(t, α, β), t = 0 .. ∞)
D(α, β) := a2(α, β) + a1(α, β)^2
D(1, 0.5) = 12
σ(1, 0.5) =  # error: Эта переменная не определена. Проверьте правильность установки обозначения.
σ(α, β) := sqrt(D(α, β))
D(5, 1) = 55
σ(5, 1) = 7.4162
D(0.5, 1) = 1
σ(0.5, 1) = 1
μ(α, β) := a3(α, β) - 2*a2(α, β)*a1(α, β) + 2*a1(α, β)^3
S(α, β) := μ(α, β)/σ(α, β)^3
# [plot: S(a, 0.5) vs a]
# [plot: D(a, 0.5) vs a]
S(α, 0.5)
D(α, 0.5)
t
F(t, 1, 0.5) - 1/2 solve → 1.38629436112 = 1.38629
F(t, 5, 1) - 1/2 solve → 4.6709088828 = 4.67091
F(t, 0.5, 1) - 1/2 solve → 0.22746821156 = 0.227468
α
α
α
