Г(x) := integral(e^(-t)*t^(x - 1), t = 0 .. ∞)
Г(12.5) = 136843368
f(t, α, β) := β^α/Г(α)*t^(α - 1)*e^(-β*t)
0^0 = 1
# [plot: f(t, 1, 0.5), f(t, 5, 1), f(t, 7.5, 1) vs t]
f(t, α, β)
t
M(α, β) := α/β
a1(α, β) := integral(t*f(t, α, β), t = 0 .. ∞)
F(t, α, β) := integral(f(x, α, β), x = 0 .. t)
a2(α, β) := integral(t^2*f(t, α, β), t = 0 .. ∞)
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# [plot: F(t, 1, 0.5), F(t, 5, 1), F(t, 7.5, 1) vs t]
F(t, α, β)
a3(α, β) := integral(t^3*f(t, α, β), t = 0 .. ∞)
D(α, β) := a2(α, β) - a1(α, β)^2
σ(α, β) := sqrt(D(α, β))
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D(1, 0.5) = 4
σ(1, 0.5) = 2
M(1, 0.5) = 2
D(5, 1) = 5
σ(5, 1) = 2.23607
M(5, 1) = 5
D(7.5, 1) = 7.50004
σ(7.5, 1) = 2.73862
M(7.5, 1) = 7.5
t
R := runif(3000, 0, 1)
i := 0 .. last(R)
R[i] := R[i]/max(R)  # error: Эта переменная не определена. Проверьте правильность установки обозначения.; disabled
URoots_1[i] := root(F(t, 1, 0.5) - R[i], t, 0, 50)
Roots_1 := sort(URoots_1)
sort(R) = [
    0.999899
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]
sum(Roots_1[i], i = 0 .. last(R))/(last(R) + 1) = 2.02461
D_1 := sum(Roots_1[i]^2, i = 0 .. last(R))/(last(R) + 1) - (sum(Roots_1[i], i = 0 .. last(R))/(last(R) + 1))^2 = 4.22017
σ_1 := sqrt(D_1) = 2.05431
M(1, 0.5) = 2
D(1, 0.5) = 4
count := 10
lower := floor(min(Roots_1))
a := 5
upper := ceil(max(Roots_1))
b := 1
h := (upper - lower)/count
lower = 0
URoots_2[i] := root(F(t, a, b) - R[i], t, 0, 50)
upper = 19
j := 1 .. (count + 1)
Roots_2 := sort(URoots_2)
int_1[j] := lower + j*h
t_1 := hist(int_1, Roots_1)/count
sum(Roots_2[i], i = 0 .. last(R))/(last(R) + 1) = 5.02089
D_2 := sum(Roots_2[i]^2, i = 0 .. last(R))/(last(R) + 1) - (sum(Roots_2[i], i = 0 .. last(R))/(last(R) + 1))^2 = 5.16097
h = 1.9
g := t_1 - 0.5
int_1 := int_1
σ_2 := sqrt(D_2) = 2.27178
M(a, b) = 5
D(a, b) = 5
# [plot: t_1 vs int_1]
lower := floor(min(Roots_2))
upper := ceil(max(Roots_2))
h := (upper - lower)/count
h = 1.8
lower = 0
t_1 = [183.4; 71.2; 27.4; 9.8; 4.7; 2.4; 0.6; 0.3; 0.1; 0.1; 0]
j := 1 .. (count + 1)
upper = 18
int_2[j] := lower + j*h
t_2 := hist(int_2, Roots_2)/count
int_2 := int_2
# [plot: t_2 vs int_2]
F(3, 1, 0.5) = 0.77687
int_2 = [0; 1.8; 3.6; 5.4; 7.2; 9; 10.8; 12.6; 14.4; 16.2; 18; 19.8]
a := 7.5
b := 1
URoots_3[i] := root(F(t, a, b) - R[i], t, 0, 50)
Roots_3 := sort(URoots_3)
sum(Roots_3[i], i = 0 .. last(R))/(last(R) + 1) = 7.52419
D_3 := sum(Roots_3[i]^2, i = 0 .. last(R))/(last(R) + 1) - (sum(Roots_3[i], i = 0 .. last(R))/(last(R) + 1))^2 = 7.72975
σ_3 := sqrt(D_3) = 2.78024
M(a, b) = 7.5
D(a, b) = 7.50004
lower := floor(min(Roots_3))
upper := ceil(max(Roots_3))
h := (upper - lower)/count
lower = 1
j := 1 .. (count + 1)
h = 2.2
upper = 23
int_3[0] := lower
int_3[j] := int_3[j - 1] + h
t_3 := hist(int_3, Roots_3)/count
int_3 := int_3 - lower
t_3*count = [91; 604; 975; 775; 357; 128; 51; 14; 3; 2; 0]
# [plot: Roots_1[i], Roots_2[i], Roots_3[i] vs i]
# [plot: Roots_1[i], Roots_2[i], Roots_3[i] vs i]
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# [plot: t_1 vs int_1]
# [plot: t_3 vs int_3]
# [plot: t_2 vs int_2]
