Г(x) := integral(e^(-t)*t^(x - 1), t = 0 .. ∞)
Г(12.5) = 136843368
f(t, α, β) := β^α/Г(α)*t^(α - 1)*e^(-β*t)
0^0 = 1
# [plot: f(t, 1, 0.5), f(t, 5, 1), f(t, 7.5, 1) vs t]
f(t, α, β)
t
M(α, β) := α/β
a1(α, β) := integral(t*f(t, α, β), t = 0 .. ∞)
F(t, α, β) := integral(f(x, α, β), x = 0 .. t)
a2(α, β) := integral(t^2*f(t, α, β), t = 0 .. ∞)
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# [plot: F(t, 1, 0.5), F(t, 5, 1), F(t, 7.5, 1) vs t]
F(t, α, β)
a3(α, β) := integral(t^3*f(t, α, β), t = 0 .. ∞)
D(α, β) := a2(α, β) - a1(α, β)^2
σ(α, β) := sqrt(D(α, β))
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D(1, 0.5) = 4
σ(1, 0.5) = 2
M(1, 0.5) = 2
D(5, 1) = 5
σ(5, 1) = 2.23607
M(5, 1) = 5
D(7.5, 1) = 7.50004
σ(7.5, 1) = 2.73862
M(7.5, 1) = 7.5
t
R := runif(10, 0, 1)
i := 0 .. last(R)
R[i] := R[i]/max(R)  # error: Эта переменная не определена. Проверьте правильность установки обозначения.; disabled
URoots_1[i] := root(F(t, 1, 0.5) - R[i], t, 0, 50)
Roots_1 := sort(URoots_1)
sort(R) = [0.253404; 0.259377; 0.331063; 0.408709; 0.466807; 0.474169; 0.652247; 0.779492; 0.959509; 0.986541]
sum(Roots_1[i], i = 0 .. last(R))/(last(R) + 1) = 2.57568
D_1 := sum(Roots_1[i]^2, i = 0 .. last(R))/(last(R) + 1) - (sum(Roots_1[i], i = 0 .. last(R))/(last(R) + 1))^2 = 6.84391
σ_1 := sqrt(D_1) = 2.61609
M(1, 0.5) = 2
D(1, 0.5) = 4
count := 10
lower := floor(min(Roots_1))
a := 5
upper := ceil(max(Roots_1))
b := 1
h := (upper - lower)/count
lower = 0
URoots_2[i] := root(F(t, a, b) - R[i], t, 0, 50)
upper = 9
j := 1 .. (count + 1)
Roots_2 := sort(URoots_2)
int_1[j] := lower + j*h
t_1 := hist(int_1, Roots_1)/count
sum(Roots_2[i], i = 0 .. last(R))/(last(R) + 1) = 5.65836
D_2 := sum(Roots_2[i]^2, i = 0 .. last(R))/(last(R) + 1) - (sum(Roots_2[i], i = 0 .. last(R))/(last(R) + 1))^2 = 6.43666
h = 0.9
g := t_1 - 0.5
int_1 := int_1
σ_2 := sqrt(D_2) = 2.53706
M(a, b) = 5
D(a, b) = 5
# [plot: t_1 vs int_1]
lower := floor(min(Roots_2))
upper := ceil(max(Roots_2))
h := (upper - lower)/count
h = 0.9
lower = 3
t_1 = [0.3; 0.3; 0.1; 0.1; 0; 0; 0; 0.1; 0; 0.1; 0]
j := 1 .. (count + 1)
upper = 12
int_2[j] := lower + j*h
t_2 := hist(int_2, Roots_2)/count
int_2 := int_2
# [plot: t_2 vs int_2]
F(3, 1, 0.5) = 0.77687
int_2 = [0; 3.9; 4.8; 5.7; 6.6; 7.5; 8.4; 9.3; 10.2; 11.1; 12; 12.9]
a := 7.5
b := 1
URoots_3[i] := root(F(t, a, b) - R[i], t, 0, 50)
Roots_3 := sort(URoots_3)
sum(Roots_3[i], i = 0 .. last(R))/(last(R) + 1) = 8.30881
D_3 := sum(Roots_3[i]^2, i = 0 .. last(R))/(last(R) + 1) - (sum(Roots_3[i], i = 0 .. last(R))/(last(R) + 1))^2 = 9.10284
σ_3 := sqrt(D_3) = 3.01709
M(a, b) = 7.5
D(a, b) = 7.50004
lower := floor(min(Roots_3))
upper := ceil(max(Roots_3))
h := (upper - lower)/count
lower = 5
# [plot: t_3 vs int_3]
# [plot: t_2 vs int_2]
j := 1 .. (count + 1)
h = 1
upper = 15
int_3[0] := lower
int_3[j] := int_3[j - 1] + h
t_3 := hist(int_3, Roots_3)/count
int_3 := int_3 - lower
t_3*count = [2; 4; 0; 1; 1; 0; 0; 1; 0; 1; 0]
# [plot: t_1 vs int_1]
# [plot: Roots_1[i], Roots_2[i], Roots_3[i] vs i]
# [plot: Roots_1[i], Roots_2[i], Roots_3[i] vs i]
Q(t, α, β) := F(t, α, β)
P(t, α, β) := 1 - Q(t, α, β)
λ(t, α, β) := f(t, α, β)/P(t, α, β)
N0 := 20
n := 1 .. 3
Y := runif(N0, 0, 1)
i := 0 .. last(Y)
X_1[i] := root(F(t, 5, 1) - Y[i], t, 0, 50)
X_2[i] := root(F(t, 1, 0.5) - Y[i], t, 0, 50)
X_3[i] := root(F(t, 7.5, 1) - Y[i], t, 0, 50)
X_1 := sort(X_1)
X_2 := sort(X_2)
X_3 := sort(X_3)
N_1(t) :=
    i ← 0
    while t > X_1[i]
        i ← i + 1
    N0 - i
N_2(t) :=
    i ← 0
    while t > X_2[i]
        i ← i + 1
    N0 - i
N_3(t) :=
    i ← 0
    while t > X_3[i]
        i ← i + 1
    N0 - i
h := 0.5
h := 0.5
h := 0.5
T_max_1 := round(max(X_1)/h, 0)
T_max_2 := round(max(X_2)/h, 0)
T_max_3 := round(max(X_3)/h, 0)
i_1 := 0 .. T_max_1
i_2 := 0 .. T_max_2
i_3 := 0 .. T_max_3
T_1[i_1] := i_1*h
T_2[i_2] := i_2*h
T_3[i_3] := i_3*h
i_1 := 0 .. T_max_1 - 1
i_2 := 0 .. T_max_2 - 1
i_3 := 0 .. T_max_3 - 1
P1_1[i_1] := N_1(T_1[i_1])/N0
P1_2[i_2] := N_2(T_2[i_2])/N0
P1_3[i_3] := N_3(T_3[i_3])/N0
P1_1[T_max_1] := 0
P1_2[T_max_2] := 0
P1_3[T_max_3] := 0
Q1_1[i_1] := (N0 - N_1(T_1[i_1]))/N0
Q1_2[i_2] := (N0 - N_2(T_2[i_2]))/N0
Q1_3[i_3] := (N0 - N_3(T_3[i_3]))/N0
# [plot: P(t, 5, 1), P(t, 1, 0.5), P(t, 7.5, 1) vs t]
# [plot: P1_1, P1_2, P1_3 vs T]
# [plot: Q(t, 5, 1) vs t]
# [plot: Q1 vs T]
i_1 := 0 .. T_max_1 - 2
f1_1[i_1] := (N_1(T_1[i_1]) - N_1(T_1[i_1] + h))/(N0*h)
# [plot: f(t, 5, 1) vs t]
# [plot: f1 vs T]
λ1_1[i_1] := (N_1(T_1[i_1]) - N_1(T_1[i_1] + h))/(N_1(T_1[i_1])*h)
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# [plot: λ1 vs T]
# [plot: λ(t, 5, 1) vs t]
