## Модель Шика-Волвертона
# 1. Генерация статистики
ORIGIN := 1
n := 26
i := 1 .. n
t := rexp(n, 0.05)
t := sort(t)
# 2. Решение системы уравнений и нахождение коэффициентов
Given
E0 := 26
t = [2.61964; 2.86628; 2.94905; 3.33114; 5.16411; 7.94587; 8.22669; 9.76838; 10.1944; 12.4414; 13.31; 14.6442; 15.9967; 16.4954; 17.0071; 20.9702; 21.2495; 26.6501; 27.8921; 29.7875; 32.5859; 39.3532; 39.8472; 47.0703; 47.8784; 62.2426]
Ksw := 0.039
t1 := [0.032; 0.915; 1.144; 1.804; 2.064; 2.918; 3.442; 3.653; 5.071; 6.942; 10.014; 10.357; 11.311; 14.379; 16.355; 17.27; 17.35; 19.14; 26.219; 27.271; 27.759; 28.672; 31.588; 34.133; 66.027; 79.436]
sum(1/Ksw - (E0 - (i - 1))*t1[i]^2/2, i = 1 .. n) == 0
sum(1/(E0 - (i - 1)) - Ksw*t1[i]^2/2, i = 1 .. n) == 0
[Ksw1; E01] := Minerr(Ksw, E0) = [0.00218586; 23.6997]
Ksw1 = 0.00218586  # оценка коэффициента Шика-Волвертона
E01 = 23.6997  # оценка числа ошибок в ПО до начала тестирования
# 3. Расчет параметров модели
λ[i] := |Ksw1*(E01 - (i - 1))*t1[i]|
λ[n + 1] := |Ksw1*(E01 - n)*(t1[n] + rnd(t1[n] - t1[n - 1]))|
λ[n + 1] = 0.43324  # интенсивность отказов до следующей n+1-й ошибки
m[n + 1] := 1/λ[n + 1]
m[n + 1] = 2.30819  # средняя наработка до следующей n+1-й ошибки
t1[n + 1] := t1[n]
P[n + 1] := e^(-λ[n + 1]*t1[n + 1])
P[n + 1] = 1.13189e-15  # вероятность безотказной работы (отсутствия следующего n+1-го отказа)
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