# Worksheet setting: ORIGIN = 1
Г(x) := integral(e^(-t)*t^(x - 1), t = 0 .. ∞)  # disabled
Г(12.5) = 136843368  # disabled
f(t, α, β) := β^α/Г(α)*t^(α - 1)*e^(-β*t)  # disabled
0^0 = 1  # disabled
# [plot: f(t, 1, 0.5), f(t, 5, 1), f(t, 7.5, 1) vs t]
f(t, α, β)  # disabled
t  # disabled
M(α, β) := α/β  # disabled
a1(α, β) := integral(t*f(t, α, β), t = 0 .. ∞)  # disabled
F(t, α, β) := integral(f(x, α, β), x = 0 .. t)  # disabled
a2(α, β) := integral(t^2*f(t, α, β), t = 0 .. ∞)  # disabled
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# [plot: F(t, 1, 0.5), F(t, 5, 1), F(t, 7.5, 1) vs t]
F(t, α, β)  # disabled
a3(α, β) := integral(t^3*f(t, α, β), t = 0 .. ∞)  # disabled
D(α, β) := a2(α, β) - a1(α, β)^2  # disabled
σ(α, β) := sqrt(D(α, β))  # disabled
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D(1, 0.5) = 4  # disabled
σ(1, 0.5) = 2  # disabled
M(1, 0.5) = 2  # disabled
D(5, 1) = 5  # disabled
σ(5, 1) = 2.23607  # disabled
M(5, 1) = 5  # disabled
D(7.5, 1) = 7.50004  # disabled
σ(7.5, 1) = 2.73862  # disabled
M(7.5, 1) = 7.5  # disabled
t  # disabled
R := runif(10, 0, 1)  # disabled
i := 0 .. last(R)  # disabled
R[i] := R[i]/max(R)  # error: This variable is undefined. Check that the label is set correctly.; disabled
URoots_1[i] := root(F(t, 1, 0.5) - R[i], t, 0, 50)  # disabled
Roots_1 := sort(URoots_1)  # disabled
sort(R) = [0.253404; 0.259377; 0.331063; 0.408709; 0.466807; 0.474169; 0.652247; 0.779492; 0.959509; 0.986541]  # disabled
sum(Roots_1[i], i = 0 .. last(R))/(last(R) + 1) = 2.57568  # disabled
D_1 := sum(Roots_1[i]^2, i = 0 .. last(R))/(last(R) + 1) - (sum(Roots_1[i], i = 0 .. last(R))/(last(R) + 1))^2 = 6.84391  # disabled
σ_1 := sqrt(D_1) = 2.61609  # disabled
M(1, 0.5) = 2  # disabled
D(1, 0.5) = 4  # disabled
count := 10  # disabled
lower := floor(min(Roots_1))  # disabled
a := 5  # disabled
upper := ceil(max(Roots_1))  # disabled
b := 1  # disabled
h := (upper - lower)/count  # disabled
lower = 0  # disabled
URoots_2[i] := root(F(t, a, b) - R[i], t, 0, 50)  # disabled
upper = 9  # disabled
j := 1 .. (count + 1)  # disabled
Roots_2 := sort(URoots_2)  # disabled
int_1[j] := lower + j*h  # disabled
t_1 := hist(int_1, Roots_1)/count  # disabled
sum(Roots_2[i], i = 0 .. last(R))/(last(R) + 1) = 5.65836  # disabled
D_2 := sum(Roots_2[i]^2, i = 0 .. last(R))/(last(R) + 1) - (sum(Roots_2[i], i = 0 .. last(R))/(last(R) + 1))^2 = 6.43666  # disabled
h = 0.9  # disabled
g := t_1 - 0.5  # disabled
int_1 := int_1  # disabled
σ_2 := sqrt(D_2) = 2.53706  # disabled
M(a, b) = 5  # disabled
D(a, b) = 5  # disabled
# [plot: t_1 vs int_1]
lower := floor(min(Roots_2))  # disabled
upper := ceil(max(Roots_2))  # disabled
h := (upper - lower)/count  # disabled
h = 0.9  # disabled
lower = 3  # disabled
t_1 = [0.3; 0.3; 0.1; 0.1; 0; 0; 0; 0.1; 0; 0.1; 0]  # disabled
j := 1 .. (count + 1)  # disabled
upper = 12  # disabled
int_2[j] := lower + j*h  # disabled
t_2 := hist(int_2, Roots_2)/count  # disabled
int_2 := int_2  # disabled
# [plot: t_2 vs int_2]
F(3, 1, 0.5) = 0.77687  # disabled
int_2 = [0; 3.9; 4.8; 5.7; 6.6; 7.5; 8.4; 9.3; 10.2; 11.1; 12; 12.9]  # disabled
a := 7.5  # disabled
b := 1  # disabled
URoots_3[i] := root(F(t, a, b) - R[i], t, 0, 50)  # disabled
Roots_3 := sort(URoots_3)  # disabled
sum(Roots_3[i], i = 0 .. last(R))/(last(R) + 1) = 8.30881  # disabled
D_3 := sum(Roots_3[i]^2, i = 0 .. last(R))/(last(R) + 1) - (sum(Roots_3[i], i = 0 .. last(R))/(last(R) + 1))^2 = 9.10284  # disabled
σ_3 := sqrt(D_3) = 3.01709  # disabled
M(a, b) = 7.5  # disabled
D(a, b) = 7.50004  # disabled
lower := floor(min(Roots_3))  # disabled
upper := ceil(max(Roots_3))  # disabled
h := (upper - lower)/count  # disabled
lower = 5  # disabled
# [plot: t_3 vs int_3]
# [plot: t_2 vs int_2]
j := 1 .. (count + 1)  # disabled
h = 1  # disabled
upper = 15  # disabled
int_3[0] := lower  # disabled
int_3[j] := int_3[j - 1] + h  # disabled
t_3 := hist(int_3, Roots_3)/count  # disabled
int_3 := int_3 - lower  # disabled
t_3*count = [2; 4; 0; 1; 1; 0; 0; 1; 0; 1; 0]  # disabled
# [plot: t_1 vs int_1]
# [plot: Roots_1[i], Roots_2[i], Roots_3[i] vs i]
# [plot: Roots_1[i], Roots_2[i], Roots_3[i] vs i]
Q(t, α, β) := F(t, α, β)  # disabled
P(t, α, β) := 1 - Q(t, α, β)  # disabled
λ(t, α, β) := f(t, α, β)/P(t, α, β)  # disabled
N0 := 20  # disabled
n := 1 .. 3  # disabled
Y := runif(N0, 0, 1)  # disabled
i := 0 .. last(Y)  # disabled
X_1[i] := root(F(t, 5, 1) - Y[i], t, 0, 50)  # disabled
X_2[i] := root(F(t, 1, 0.5) - Y[i], t, 0, 50)  # disabled
X_3[i] := root(F(t, 7.5, 1) - Y[i], t, 0, 50)  # disabled
X_1 := sort(X_1)  # disabled
X_2 := sort(X_2)  # disabled
X_3 := sort(X_3)  # disabled
N_1(t) :=
    i ← 0
    while t > X_1[i]
        i ← i + 1
    N0 - i  # disabled
N_2(t) :=
    i ← 0
    while t > X_2[i]
        i ← i + 1
    N0 - i  # disabled
N_3(t) :=
    i ← 0
    while t > X_3[i]
        i ← i + 1
    N0 - i  # disabled
h := 0.5  # disabled
h := 0.5  # disabled
h := 0.5  # disabled
T_max_1 := round(max(X_1)/h, 0)  # disabled
T_max_2 := round(max(X_2)/h, 0)  # disabled
T_max_3 := round(max(X_3)/h, 0)  # disabled
i_1 := 0 .. T_max_1  # disabled
i_2 := 0 .. T_max_2  # disabled
i_3 := 0 .. T_max_3  # disabled
T_1[i_1] := i_1*h  # disabled
T_2[i_2] := i_2*h  # disabled
T_3[i_3] := i_3*h  # disabled
i_1 := 0 .. T_max_1 - 1  # disabled
i_2 := 0 .. T_max_2 - 1  # disabled
i_3 := 0 .. T_max_3 - 1  # disabled
P1_1[i_1] := N_1(T_1[i_1])/N0  # disabled
P1_2[i_2] := N_2(T_2[i_2])/N0  # disabled
P1_3[i_3] := N_3(T_3[i_3])/N0  # disabled
P1_1[T_max_1] := 0  # disabled
P1_2[T_max_2] := 0  # disabled
P1_3[T_max_3] := 0  # disabled
Q1_1[i_1] := (N0 - N_1(T_1[i_1]))/N0  # disabled
Q1_2[i_2] := (N0 - N_2(T_2[i_2]))/N0  # disabled
Q1_3[i_3] := (N0 - N_3(T_3[i_3]))/N0  # disabled
# [plot: P(t, 5, 1), P(t, 1, 0.5), P(t, 7.5, 1) vs t]
# [plot: P1_1, P1_2, P1_3 vs T]
# [plot: Q(t, 5, 1) vs t]
# [plot: Q1 vs T]
i_1 := 0 .. T_max_1 - 2  # disabled
f1_1[i_1] := (N_1(T_1[i_1]) - N_1(T_1[i_1] + h))/(N0*h)  # disabled
# [plot: f(t, 5, 1) vs t]
# [plot: f1 vs T]
λ1_1[i_1] := (N_1(T_1[i_1]) - N_1(T_1[i_1] + h))/(N_1(T_1[i_1])*h)  # disabled
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# [plot: λ1 vs T]
# [plot: λ(t, 5, 1) vs t]
λ(t) := K[sw]*(E[0] - (i - 1))*t[i]  # error: This variable is undefined. Check that the label is set correctly.
ORIGIN = 1
n := 34
i := 1 .. n
t := rexp(n, 0.05)
t := sort(t)
E0 := 34
t = [
    0.06419; 0.231161; 0.902043; 2.64851; 2.96491; 3.48423; 3.89993; 4.8843; 4.97799; 6.83586
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]
Ksw := 0.039
sum([1/Ksw - [E0 - (i - 1)*t[i]*2/2]], i = 1 .. n) = [[22232.9]]
sum([1/(E0 - (i - 1)) - Ksw*t[i]^2/2], i = 1 .. n) = [-1016.52]
minerr(Ksw, Eo) =  # error: This function is misplaced. Move it to a solve block with one solve block function only.
